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5 + 23/38*6.1 = 8.69211
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a := 6.24
b := -3.17
a^2 + 2*a*b = -0.624
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f(x, y) := x*sin(y)
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f(-3.6, 2) = -3.27347
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x3 := 1 .. 6
y(x3) := (x3 + 1)^3 - (x3 + 2)^-3
x3 = [1; 2; 3; 4; 5; 6]
y(x3) = [7.96296; 26.9844; 63.992; 124.995; 215.997; 342.998]
i := 0 .. 6
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x1[i] := 3 - 0.3*i
y1(x1) := 5*sin(x1) + x1
y1(x1) = [3.7056; 4.8369; 5.77732; 6.41605; 6.66924; 6.48747; 5.8602]
x1 = [3; 2.7; 2.4; 2.1; 1.8; 1.5; 1.2]
x2 := 6, 6.5 .. 9
y3(x2) := (x2 + 1)/(x2 + 1)
x2 = [6; 6.5; 7; 7.5; 8; 8.5; 9]
y(x2) = [342.998; 421.873; 511.999; 614.124; 728.999; 857.374; 999.999]
f1(x5) := sin(x5^2)
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f2(x6) := 2*x6^2 - 5*x6 + 1
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f3(x7) := x7^3 + 3*x7^2 - 2
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z(x9, y5) := y5^2 - x9^2
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# [component: inputs z]
# [component: inputs z]
# [component: inputs z]
# [component: inputs z]
# [component: inputs z]
# [component: inputs z]
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# 6 *  + 19 =
(6. + 14/5.8) + 19 = 27.4138
p := 0.73
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v := 5
p*nthroot(v, 3) + v^2/p = 35.4949
f11(x11) := x11^2*sin(x11)
x12 := -2 .. 2
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f11(x12) = [-3.63719; -0.841471; 0; 0.841471; 3.63719]
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f12(x13) := x13^3 - 3*x13^2
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