M := [1, 2, 1; 0, -1.5, 4; 2, 3, 1]
M[:, 1] = [2; -1.5; 3]
|M| = 5.5
M[1, 2] = 4
M^-1 = [-2.45455, 0.181818, 1.72727; 1.45455, -0.181818, -0.727273; 0.545455, 0.181818, -0.272727]
B := [12; 21; 44]
B[2] = 44
f(i, j) := 2*i + j
M1 := matrix(3, 3, f)
M1 = [0, 1, 2; 2, 3, 4; 4, 5, 6]
identity(3) = [1, 0, 0; 0, 1, 0; 0, 0, 1]
matrix(2, 3, f) = [0, 1, 2; 2, 3, 4]
v := [11; 22; 33]
diag(v) = [11, 0, 0; 0, 22, 0; 0, 0, 33]
M2 := diag(v)
M2 = [11, 0, 0; 0, 22, 0; 0, 0, 33]
submatrix(M1, 1, 2, 1, 2) = [3, 4; 5, 6]
augment(M1, v) = [0, 1, 2, 11; 2, 3, 4, 22; 4, 5, 6, 33]
ORIGIN := 1
stack(M1, M2) = [0, 1, 2; 2, 3, 4; 4, 5, 6; 11, 0, 0; 0, 22, 0; 0, 0, 33]
submatrix(M1, 1, 2, 1, 2) = [0, 1; 2, 3]
ORIGIN := 1
M3 := [1, 2, 8, -2; 0, -1, 4, 7; -6, 3, -5, 5]
V := [11; 12; 13]
cols(M3) = 4
max(M3) = 8
min(M3) = -6
last(V) = 3
rows(M3) = 3
mean(M3) = 1.33333
length(V) = 3
rank(M3) = 3
ORIGIN := 1
v := [2; 0; 3; 1]
sort(v) = [0; 1; 2; 3]
reverse(v) = [1; 3; 0; 2]
M4 := [5, 2, 5, 5; 6, 3, 6, 6; 2, 1, 4, 3]
rsort(M4, 3) = [2, 5, 5, 5; 3, 6, 6, 6; 1, 2, 3, 4]
csort(M4, 2) = [2, 1, 4, 3; 5, 2, 5, 5; 6, 3, 6, 6]
M5 := [2, -1, 1; -5, 7, -1; 1, 3, 5]
v := [1; 14; 20]
|M5| = 30
x := lsolve(M5, v)
x = [1; 3; 2]
M5*x - v = [0; 0; 0]
Δ := |M5|
Δ = 30
M5 := [2, -1, 1; -5, 7, -1; 1, 3, 5]
v1 := [1; 14; 20]
M6 := [1, -1, 1; 14, 7, -1; 20, 3, 5]
M7 := [2, 1, 1; -5, 14, -1; 1, 20, 5]
M8 := [2, -1, 1; -5, 7, 14; 1, 3, 20]
Δ1 := |M6|
Δ1 = 30
Δ2 := |M7|
Δ2 = 90
Δ3 := |M8|
Δ3 = 60
x1 := Δ1/Δ
x1 = 1
x2 := Δ2/Δ
x2 = 3
x3 := Δ3/Δ
x3 = 2
x := [x1; x2; x3]
x = [1; 3; 2]
M5*x - v = [0; 0; 0]
